avlgeogen
#Autogenerated AVL Geometry

0.0
0   1   0
11.5672131148   1.13627   8.4
9.66330128124   0.0   0.0
0.0098379


SURFACE
Main Wing

10.0   1.0   40.0   -2.0

YDUPLICATE
0.0
SCALE
1.0   1.0   1.0


SECTION
0.3917   0.0   0.0   1.37704918033   0.0
NACA
4412

SECTION
0.3917   3.059   0.289   1.136   0.0
NACA
4412

CONTROL
Aileron   -1.0   0.725   0.0   1.62   0.199   -2.0


SECTION
0.3917   4.67   0.487   1.136   0.0
NACA
4412

CONTROL
Aileron   -1.0   0.725   0.0   1.62   0.199   -2.0


SECTION
0.3917   5.02   0.5291   1.37704918033   0.0
NACA
4412

SURFACE
Horizontal Tail

10.0   1.0   25.0   1.0

YDUPLICATE
0.0
SCALE
1.0   1.0   1.0


SECTION
3.0   0.0   0.51   0.5   0.0
NACA
4412

CONTROL
Elevator   1.0   0.5   0.0   1.0   0.0   1.0


SECTION
3.0   1.6   0.51   0.5   0.0
NACA
4412

CONTROL
Elevator   1.0   0.5   0.0   1.0   0.0   1.0


SURFACE
Vertical Tail

10.0   1.0   10.0   0.0

YDUPLICATE
0.0
SCALE
1.0   1.0   1.0


SECTION
3.0   1.6   0.51   0.5   0.0
NACA
4412

CONTROL
Rudder   1.0   0.5   0.0   0.0   1.0   1.0


SECTION
3.0   1.6   1.41   0.5   0.0
NACA
4412

CONTROL
Rudder   1.0   0.5   0.0   0.0   1.0   1.0


#END
